// COMSOL Multiphysics 6.1.0.282 model "P.mph"
// Outline of the model tree

Parameters
  k1 = 1
  L1 = 0.1
  L2 = 0.5
  L3 = 0.1
  L4 = 0.3
  a = 1
  kx = k1*pi/a[m]
  Es = 20e6
  rhos = 1900
  Ps = 0.35
  Ec = 30e9
  rhoc = 2500
  Pc = 0.2
  Er = 0.1e6
  Pr = 0.47
  rhor = 1300
  cs = sqrt((Ps*Es/(1-2*Ps)/(1+Ps)+Es/(1+Ps))/rhos)
  cc = sqrt((Pc*Ec/(1-2*Pc)/(1+Pc)+Ec/(1+Pc))/rhoc)
  cr = sqrt((Pr*Er/(1-2*Pr)/(1+Pr)+Er/(1+Pr))/rhor)

Geometry
  geom1 "几何 1" (1D, length unit m)
    i1: Interval "线段间隔 1" | coord = {0, L1*a, (L2+L1)*a, (L3+L2+L1)*a, (L4+L3+L2+L1)*a}
    fin: Finalize "形成联合体"

Physics
  acpr: PressureAcoustics "压力声学，频域" on all domains
    dependent variable p
    fpam1: FrequencyPressureAcousticsModel "soil" (default) | rho_mat = userdef; rho = rhos; c_mat = userdef; c = cs
    shb1: SoundHard "硬声场边界（壁） 1" (default)
    init1: init "初始值 1" (default)
    fpam2: FrequencyPressureAcousticsModel "concrete" on domains 2
      rho_mat = userdef
      rho = rhoc
      c_mat = userdef
      c = cc
    fpam3: FrequencyPressureAcousticsModel "rubber" on domains 1, 3
      rho_mat = userdef
      rho = rhor
      c_mat = userdef
      c = cr
    pc1: PeriodicCondition "周期性条件 1" on boundaries 1, 5
      PeriodicType = Floquet
      kFloquet = {kx, 0, 0}
      destinationDomains: boundaries 5

Mesh
  mesh1 "网格 1"
    size: MeshSizeDefault "大小" | custom = on
    edg1: Edge "边 1" on remaining entities

Studies
  std1 "研究 1"
    param: Parametric "参数化扫描" | pname = k1; plistarr = 0 1
    eig: Eigenfrequency "特征频率" | shift = 1[Hz]; conrad = 1; linpsolnum = auto

Solver configurations
  sol1 "解 1" (study std1)
    v1: Variables "因变量 1"
    e1: Eigenvalue "特征值求解器 1" | transform = eigenfrequency; shift = 1[Hz]; eigref = 100
      dDef: Direct "直接"
  sol2 "参数化解 1" (study std1)

Datasets
  dset1: Solution | solution = sol1
  dset2: Solution | solution = sol2

Evaluation groups
  std1EvgFrq: EvaluationGroup "特征频率 (研究 1)" | data = dset2
    gev1: EvalGlobal "全局计算 1"
      expr = {freq*2*pi, imag(freq)/abs(freq), abs(freq)/imag(freq)/2}
      unit = {rad/s, 1, 1}
      descr = {角频率, 阻尼比, 品质因子}

Plots
  pg1: PlotGroup1D "声压 (acpr)" | data = dset2
    lngr1: LineGraph "线结果图 1" on domains 1-4 | expr = acpr.p_t; xdata = expr; xdataexpr = x
  pg2: PlotGroup1D "声压级 (acpr)" | data = dset2
    lngr1: LineGraph "线结果图 1" on domains 1-4 | expr = acpr.Lp_t; xdata = expr; xdataexpr = x
  pg3: PlotGroup1D "一维绘图组 3" | data = dset1
    glob1: Global "全局 1" | data = dset2; expr = acpr.freq; descr = 频率